# 3d Lennard-Jones melt

units		lj
atom_style	atomic

lattice		fcc 0.8442
region		box block 0 $L 0 $L 0 $L
create_box	1 box
create_atoms	1 box
mass		1 1.0

velocity	all create 1.44 87287 loop geom

pair_style	lj/cut 2.5
pair_coeff	1 1 1.0 1.0 2.5

neighbor	0.3 bin
neigh_modify	delay 0 every 20 check yes

fix		1 all nve
thermo          10000

variable nsteps equal 10000000
fix stop all halt 10 tlimit > 10 error continue
run		${nsteps}
fix stop all halt 10 tlimit > 60 error soft
run		${nsteps}
